import Sofa
import SofaRuntime
import numpy as np
import os
from Sofa import SofaDeformable
from time import process_time, time
import datetime
from sklearn.preprocessing import MinMaxScaler
from training.train_sofa import Routine
# add network path to the python path
import sys
sys.path.append(os.path.join(os.path.dirname(__file__), '../network'))

import json

import os
import json
import datetime
import numpy as np

import glob
import traceback
from scipy import sparse
from scipy.sparse.linalg import eigsh


class AnimationStepController(Sofa.Core.Controller):
    def __init__(self, node, *args, **kwargs):
        Sofa.Core.Controller.__init__(self, *args, **kwargs)
        self.mass = kwargs.get('mass')
        self.fem = kwargs.get('fem')
        self.linear_solver = kwargs.get('linear_solver')
        self.surface_topo = kwargs.get('surface_topo')
        self.MO1 = kwargs.get('MO1')
        self.fixed_box = kwargs.get('fixed_box')
        self.exactSolution = kwargs.get('exactSolution')
        self.cff = kwargs.get('cff')


        self.key = kwargs.get('key')
        self.iteration = kwargs.get("sample")
        self.start_time = 0
        self.root = node
        self.save = False
        self.l2_error, self.MSE_error = [], []
        self.l2_deformation, self.MSE_deformation = [], []
        self.RMSE_error, self.RMSE_deformation = [], []
        self.directory = kwargs.get('directory')
        # Add material properties to controller
        self.young_modulus = kwargs.get('young_modulus', 5000)
        self.poisson_ratio = kwargs.get('poisson_ratio', 0.25)
        self.density = kwargs.get('density', 10)
        self.volume = kwargs.get('volume', 1)
        self.total_mass = kwargs.get('total_mass', 10)
        self.mesh_filename = kwargs.get('mesh_filename', 'unknown')
        print(f"Using directory: {self.directory}")
        print(f"Material properties: E={self.young_modulus}, nu={self.poisson_ratio}, rho={self.density}")

        # Add eigenmodes visualization parameters
        self.show_modes = kwargs.get('show_modes', True)
        self.current_mode_index = -1  # Start with -1 to compute matrices first
        self.mode_animation_step = 0
        self.mode_animation_steps = kwargs.get('steps_per_mode', 100)  # Steps to animate each mode
        self.mode_scale = kwargs.get('mode_scale', 50.0)  # Scaling factor for eigenmodes
        self.num_modes_to_show = kwargs.get('num_modes_to_show', 5)
        self.modes_computed = False
        self.eigenvectors = None
        self.eigenvalues = None
        self.original_positions = None
        self.transition_steps = 20  # Steps to transition between modes
        self.pause_steps = 30  # Steps to pause at maximum amplitude


    def onSimulationInitDoneEvent(self, event):
        """
        Called within the Sofa pipeline at the end of the scene graph initialisation.
        """
        self.inputs = []
        self.outputs = []
        if self.save:
            if not os.path.exists('modal_data'):
                os.mkdir('modal_data')
            # get current time from computer and create a folder with that name
            if not os.path.exists(f'modal_data/{self.directory}'):
                os.makedirs(f'modal_data/{self.directory}')
            print(f"Saving data to modal_data/{self.directory}")
        self.sampled = False

        surface = self.surface_topo
        self.idx_surface = surface.triangles.value.reshape(-1)
        self.timestamp = datetime.datetime.now().strftime('%Y%m%d_%H%M%S')

        # Store the original positions for mode animation
        if self.show_modes and self.MO1:
            self.original_positions = np.copy(self.MO1.position.value)
            print(f"Stored original positions with shape {self.original_positions.shape}")


    def onAnimateBeginEvent(self, event):
        self.MO1.position.value = self.MO1.rest_position.value
        if np.linalg.norm(self.MO1.position.value) - np.linalg.norm(self.MO1.rest_position.value) < 1e-5:
            print("Corrected position")
        self.start_time = process_time()
        # Generate random points on a unit sphere
        x, y, z = np.random.randn(3)
        norm = np.sqrt(x**2 + y**2 + z**2)
        x, y, z = x / norm, y / norm, z / norm
        # Scale the random vector by the total mass
        self.externalForce = np.array([x, y, z]) * np.random.uniform(0, 10)

        if hasattr(self.exactSolution, 'force'):
            self.exactSolution.removeObject(self.cff)
        self.cff = self.exactSolution.addObject('ConstantForceField', indices="@ForceROI.indices", totalForce=self.externalForce, showArrowSize=0.1, showColor="0.2 0.2 0.8 1")
        self.cff.init()

    def onAnimateEndEvent(self, event):

        self.end_time = process_time()


    def close(self):
        print("Closing simulation")


def createScene(rootNode, config=None, directory=None, sample=0, key=(0, 0, 0), *args, **kwargs):
    """
    Create SOFA scene with parameters from a YAML config file

    Args:
        rootNode: SOFA root node
        config: Dict with configuration parameters from YAML file (or None to use defaults)
        directory: Output directory
        sample: Sample index
        key: Key tuple (x, y, r) for the simulation
    """
    # Handle default config if not provided
    if config is None:
        config = {
            'physics': {'gravity': [0, 0, 0], 'dt': 0.01},
            'material': {'youngs_modulus': 5000, 'poissons_ratio': 0.25, 'density': 10},
            'mesh': {'filename': 'mesh/beam_615.msh'},
            'constraints': {'fixed_box': [-0.01, -0.01, -0.02, 1.01, 0.01, 0.02]}
        }

    # Set basic simulation parameters
    rootNode.dt = config['physics'].get('dt', 0.01)
    rootNode.gravity = config['physics'].get('gravity', [0, 0, 0])
    rootNode.name = 'root'
    rootNode.bbox = "-10 -2 -2 10 2 2"

    # Add required plugins
    required_plugins = [
        'MultiThreading',
        'Sofa.Component.Constraint.Projective',
        'Sofa.Component.Engine.Select',
        'Sofa.Component.LinearSolver.Iterative',
        'Sofa.Component.LinearSolver.Direct',
        'Sofa.Component.Mass',
        'Sofa.Component.Mapping.Linear',
        'Sofa.Component.MechanicalLoad',
        'Sofa.Component.ODESolver.Backward',
        'Sofa.Component.SolidMechanics.FEM.Elastic',
        'Sofa.Component.StateContainer',
        'Sofa.Component.Topology.Container.Dynamic',
        'Sofa.Component.Topology.Container.Grid',
        'Sofa.Component.Visual',
        'SofaMatrix'
    ]

    for plugin in required_plugins:
        rootNode.addObject('RequiredPlugin', name=plugin)

    # Add basic scene components
    rootNode.addObject('DefaultAnimationLoop')
    rootNode.addObject('DefaultVisualManagerLoop')
    rootNode.addObject('VisualStyle', displayFlags="showBehaviorModels showCollisionModels")

    # Get material properties from config
    young_modulus = config['material'].get('youngs_modulus', 5000)
    poisson_ratio = config['material'].get('poissons_ratio', 0.25)
    density = config['material'].get('density', 10)
    volume = config['material'].get('volume', 1)
    num_modes_to_show = config['model'].get('latent_dim', 5)
    total_mass = density * volume
    print(f"Using E={young_modulus}, nu={poisson_ratio}, rho={density}, V={volume}, M={total_mass}")

    # Calculate Lamé parameters
    mu = young_modulus / (2 * (1 + poisson_ratio))
    lam = young_modulus * poisson_ratio / ((1 + poisson_ratio) * (1 - 2 * poisson_ratio))
    print(f"Using mu={mu}, lambda={lam}")
    mu_lam_str = f"{mu} {lam}"

    # Get mesh filename from config
    mesh_filename = config['mesh'].get('filename', 'mesh/beam_615.msh')

    # Create high resolution solution node
    exactSolution = rootNode.addChild('HighResSolution2D', activated=True)
    exactSolution.addObject('MeshGmshLoader', name='grid', filename=mesh_filename)
    surface_topo = exactSolution.addObject('TetrahedronSetTopologyContainer', name='triangleTopo', src='@grid')
    MO1 = exactSolution.addObject('MechanicalObject', name='DOFs', template='Vec3d', src='@grid')

    # Add system components
    mass = exactSolution.addObject('MeshMatrixMass', totalMass=total_mass, name="SparseMass", topology="@triangleTopo")

    # Get solver parameters from config
    rayleighStiffness = config['physics'].get('rayleigh_stiffness', 0.1)
    rayleighMass = config['physics'].get('rayleigh_mass', 0.1)

    solver = exactSolution.addObject('StaticSolver', name="ODEsolver",
                                   newton_iterations=20,
                                   printLog=True)

    linear_solver = exactSolution.addObject('CGLinearSolver',
                                          template="CompressedRowSparseMatrixMat3x3d",
                                          iterations=config['physics'].get('solver_iterations', 1000),
                                          tolerance=config['physics'].get('solver_tolerance', 1e-10),
                                          threshold=config['physics'].get('solver_threshold', 1e-10),
                                          warmStart=True)

    fem = exactSolution.addObject('TetrahedronHyperelasticityFEMForceField',
                                name="FEM",
                                materialName="NeoHookean",
                                ParameterSet=mu_lam_str)
    # fem = exactSolution.addObject('TetrahedronFEMForceField', name="FEM", youngModulus=5000, poissonRatio=0.4, method="large", updateStiffnessMatrix="false")


    # Get constraint box from config
    fixed_box_coords = config['constraints'].get('fixed_box', [-0.01, -0.01, -0.02, 1.01, 0.01, 0.02])
    fixed_box = exactSolution.addObject('BoxROI',
                                      name='ROI',
                                      box=" ".join(str(x) for x in fixed_box_coords),
                                      drawBoxes=True)
    exactSolution.addObject('FixedConstraint', indices="@ROI.indices")

    force_box_coords = config['constraints'].get('force_box', [9.99, -0.01, -0.02, 10.1, 1.01, 1.02])
    force_box = exactSolution.addObject('BoxROI',
                                        name='ForceROI',
                                        box=" ".join(str(x) for x in force_box_coords),
                                        drawBoxes=True)
    cff = exactSolution.addObject('ConstantForceField', indices="@ForceROI.indices", totalForce=[0, 0, 0], showArrowSize=0.1, showColor="0.2 0.2 0.8 1")


    # Add visual model
    visual = exactSolution.addChild("visual")
    visual.addObject('OglModel', src='@../DOFs', color='0 1 0 1')
    visual.addObject('BarycentricMapping', input='@../DOFs', output='@./')


    # Create and add controller with all components
    controller = AnimationStepController(rootNode,
                                         exactSolution=exactSolution,
                                       mass=mass,
                                       fem=fem,
                                       linear_solver=linear_solver,
                                       surface_topo=surface_topo,
                                       MO1=MO1,
                                       fixed_box=fixed_box,
                                       directory=directory,
                                       sample=sample,
                                       key=key,
                                       young_modulus=young_modulus,
                                       poisson_ratio=poisson_ratio,
                                       density=density,
                                       volume=volume,
                                       total_mass=total_mass,
                                       mesh_filename=mesh_filename,
                                       num_modes_to_show=num_modes_to_show,
                                       cff=cff,
                                       **kwargs)
    rootNode.addObject(controller)

    return rootNode, controller

if __name__ == "__main__":
    import Sofa.Gui
    from tqdm import tqdm
    import yaml
    import argparse

    # Add argument parser
    parser = argparse.ArgumentParser(description='SOFA Matrix Creation and Modal Analysis')
    parser.add_argument('--config', type=str, default='configs/default.yaml', help='Path to config file')
    parser.add_argument('--gui', action='store_true', help='Enable GUI mode')
    parser.add_argument('--steps', type=int, default=2, help='Number of steps to run in headless mode')

    args = parser.parse_args()

    # Load configuration
    try:
        with open(args.config, 'r') as f:
            config = yaml.safe_load(f)
        print(f"Loaded configuration from {args.config}")
    except Exception as e:
        print(f"Error loading config from {args.config}: {str(e)}")
        print("Using default configuration")
        config = None

    # Required plugins
    required_plugins = [
        "Sofa.GL.Component.Rendering3D",
        "Sofa.GL.Component.Shader",
        "Sofa.Component.StateContainer",
        "Sofa.Component.ODESolver.Backward",
        "Sofa.Component.LinearSolver.Direct",
        "Sofa.Component.IO.Mesh",
        "Sofa.Component.MechanicalLoad",
        "Sofa.Component.Engine.Select",
        "Sofa.Component.SolidMechanics.FEM.Elastic",
        "MultiThreading",
        "SofaMatrix",
        "Sofa.Component.SolidMechanics.FEM.HyperElastic"
    ]

    # Import all required plugins
    for plugin in required_plugins:
        SofaRuntime.importPlugin(plugin)

    # Create simulation directory
    timestamp = datetime.datetime.now().strftime('%Y-%m-%d_%H:%M:%S')
    output_dir = os.path.join('modal_data', timestamp)
    os.makedirs(output_dir, exist_ok=True)

    # Setup and run simulation
    root = Sofa.Core.Node("root")
    rootNode, controller = createScene(
        root,
        config=config,
        directory=timestamp,
        sample=0,
        key=(0, 0, 0)  # default key values
    )

    # Initialize simulation
    Sofa.Simulation.init(root)
    controller.save = True

    if args.gui:
        Sofa.Gui.GUIManager.Init("myscene", "qglviewer")
        Sofa.Gui.GUIManager.createGUI(root, __file__)
        Sofa.Gui.GUIManager.SetDimension(1000, 800)

        Sofa.Gui.GUIManager.MainLoop(root)
        Sofa.Gui.GUIManager.closeGUI()
    else:
        for _ in tqdm(range(args.steps), desc="Simulation progress"):
            Sofa.Simulation.animate(root, root.dt.value)

    controller.close()
